<?xml version="1.0"?>
<!-- Generated by Aero-Matic v 1.1

     Inputs:
                horsepower: 450
                     pitch: variable
            max engine rpm: 2400
        prop diameter (ft): 8.3333333333333

     Outputs:
              max prop rpm: 2251.56
                gear ratio:    1.07
                       Cp0: 0.049009
                       Ct0: 0.114190
       static thrust (lbs): 1844.08
       -->

<!--
    Lockheed Model 10 Electra for the Flightgear Flight Simulator
    :copyright: 2015, Peter Brendt
    :copyright: 2004, Curt Olson
    License: GPL2. See ./COPYING
-->

<propeller name="prop">
  <ixx>  12.79 </ixx>
  <diameter unit="IN"> 100.0 </diameter>
  <numblades> 5 </numblades>
  <gearratio>  1.00 </gearratio>
  <p_factor>   7.90 </p_factor>
  <minpitch> 12 </minpitch>
  <maxpitch> 45 </maxpitch>
  <minrpm>   1914 </minrpm>
  <maxrpm>   2252 </maxrpm>

 <!-- thrust coefficient as a function of advance ratio and blade angle -->
  <table name="C_THRUST" type="internal">
      <tableData>
                -10        0         15        25        35        45        55        65       90
      -0.2      -0.0557    0.0314    0.1142    0.1399    0.1542    0.1627    0.1499    0.1285   0.0000
       0.0      -0.0828    0.0000    0.1142    0.1399    0.1542    0.1642    0.1535    0.1285   0.0000
       0.2      -0.0928   -0.0285    0.0985    0.1370    0.1520    0.1642    0.1535    0.1285   0.0000
       0.4      -0.0928   -0.0663    0.0742    0.1357    0.1491    0.1627    0.1535    0.1285   0.0000
       0.6      -0.0928   -0.0928    0.0393    0.1221    0.1427    0.1585    0.1513    0.1285   0.0000
       0.8      -0.0928   -0.0928    0.0022    0.0914    0.1385    0.1528    0.1513    0.1285   0.0000
       1.0      -0.0928   -0.0928   -0.0371    0.0557    0.1328    0.1449    0.1499    0.1285   0.0000
       1.2      -0.0928   -0.0928   -0.0764    0.0171    0.1092    0.1399    0.1499    0.1285   0.0000
       1.4      -0.0928   -0.0928   -0.0928   -0.0250    0.0786    0.1377    0.1471    0.1285   0.0000
       1.6      -0.0928   -0.0928   -0.0928   -0.0635    0.0428    0.1328    0.1442    0.1285   0.0000
       1.8      -0.0928   -0.0928   -0.0928   -0.0928    0.0072    0.1142    0.1399    0.1285   0.0000
       2.0      -0.0928   -0.0928   -0.0928   -0.0928   -0.0285    0.0892    0.1393    0.1285   0.0000
       2.2      -0.0928   -0.0928   -0.0928   -0.0928   -0.0643    0.0643    0.1370    0.1285   0.0000
       2.4      -0.0928   -0.0928   -0.0928   -0.0928   -0.0928    0.0343    0.1119    0.1285   0.0000
       2.6      -0.0928   -0.0928   -0.0928   -0.0928   -0.0928    0.0043    0.0708    0.1142   0.0000
       2.8      -0.0928   -0.0928   -0.0928   -0.0928   -0.0928   -0.0257    0.0464    0.0928   0.0000
       3.0      -0.0928   -0.0928   -0.0928   -0.0928   -0.0928   -0.0557    0.0243    0.0714   0.0000
       3.2      -0.0928   -0.0928   -0.0928   -0.0928   -0.0928   -0.0856    0.0022    0.0500   0.0000
       3.4      -0.0928   -0.0928   -0.0928   -0.0928   -0.0928   -0.0928   -0.0200    0.0285   0.0000
       3.6      -0.0928   -0.0928   -0.0928   -0.0928   -0.0928   -0.0928   -0.0421    0.0072   0.0000
       3.8      -0.0928   -0.0928   -0.0928   -0.0928   -0.0928   -0.0928   -0.0643   -0.0143   0.0000
       4.0      -0.0928   -0.0928   -0.0928   -0.0928   -0.0928   -0.0928   -0.0863   -0.0357   0.0000
       6.0      -0.0928   -0.0928   -0.0928   -0.0928   -0.0928   -0.0928   -0.0928   -0.0928   0.0000
      </tableData>
  </table>

 <!-- power coefficient as a function of advance ratio and blade angle -->
  <table name="C_POWER" type="internal">
     <tableData>
               -10        0        15        25        35        45        55        65       90
      -0.2      0.0082   0.0163    0.0572    0.1299    0.2240    0.3186    0.3676    0.4068   0.4068
       0.0      0.0327   0.0082    0.0490    0.1211    0.2142    0.3186    0.3690    0.4068   0.4068
       0.2      0.0466   0.0131    0.0474    0.1127    0.2049    0.3186    0.3690    0.4068   0.4068
       0.4      0.0627   0.0286    0.0408    0.1039    0.1946    0.3186    0.3690    0.4068   0.4068
       0.6      0.0769   0.0433    0.0270    0.0965    0.1823    0.3122    0.3676    0.4068   0.4068
       0.8      0.0907   0.0580    0.0082    0.0818    0.1715    0.2980    0.3676    0.4068   0.4068
       1.0      0.1044   0.0720    0.0082    0.0573    0.1617    0.2828    0.3661    0.4068   0.4068
       1.2      0.1186   0.0576   -0.0270    0.0221    0.1431    0.2710    0.3636    0.4068   0.4068
       1.4      0.1323   0.0995   -0.0407   -0.0163    0.1103    0.2671    0.3592    0.4068   0.4068
       1.6      0.1460   0.1137   -0.0475   -0.0490    0.0696    0.2597    0.3514    0.3921   0.4068
       1.8      0.1603   0.1274   -0.0490   -0.0818    0.0204    0.2303    0.3406    0.3837   0.4068
       2.0      0.1740   0.1411   -0.0627   -0.1142   -0.0245    0.1960    0.3244    0.3759   0.4068
       2.2      0.1877   0.1554   -0.0769   -0.1470   -0.0735    0.1593    0.3146    0.3592   0.4068
       2.4      0.2019   0.1691   -0.0907   -0.1799   -0.1225    0.1137    0.3053    0.3514   0.4068
       2.6      0.2156   0.1828   -0.1044   -0.2122   -0.1554    0.0475    0.2980    0.3391   0.4068
       2.8      0.2294   0.1970   -0.1186   -0.2450   -0.1862   -0.0162    0.2916    0.3347   0.4068
       3.0      0.2436   0.2107   -0.1323   -0.2779   -0.2205   -0.0735    0.2818    0.3347   0.4068
       3.2      0.2573   0.2245   -0.1460   -0.3102   -0.2534   -0.1309    0.2637    0.3269   0.4068
       3.4      0.2710   0.2387   -0.1603   -0.3431   -0.2857   -0.1877    0.2044    0.3186   0.4068
       3.6      0.2852   0.2524   -0.1740   -0.3759   -0.3186   -0.2450    0.1436    0.3102   0.4068
       3.8      0.2990   0.2661   -0.1877   -0.4068   -0.3514   -0.3024    0.0799    0.3004   0.4068
       4.0      0.3127   0.2803   -0.2019   -0.4068   -0.4068   -0.3592    0.0162    0.2779   0.4068
       6.0      0.4068   0.4068   -0.4068   -0.4068   -0.4068   -0.4068   -0.4068   -0.2450   0.4068
     </tableData>
  </table>

<!-- thrust effects of helical tip Mach -->
<table name="CT_MACH" type="internal">
  <tableData>
    0.85   1.0
    1.05   0.8
  </tableData>
</table>

<!-- power-required effects of helical tip Mach -->
<table name="CP_MACH" type="internal">
  <tableData>
    0.85   1.0
    1.05   1.8
    2.00   1.4
  </tableData>
</table>

</propeller>
